// SBML level 2 version 4

model untitled()
  // way too minimal insulin signaling network

  // Compartments:
  compartment default = 1 volume;

  // Species:
  // hlgygouyg
  species s4 in default = 0; s4 is "R";
  species s5 in default = 0; s5 is "A";
  species s6 in default = 0; s6 is "A";
  species s2 in default = 0; s2 is "R";
  species s7 in default = 0; s7 is "R";
  species s8 in default = 0; s8 is "R";
  substanceOnly species IIS_Signal in default = 0;

  // Reactions:
  re1: s7 => s2; re1_v1*s2*IIS_Signal/(re1_k1 + s2);  // modifiers: IIS_Signal
    re1_v1 = 1 substance; re1_k1 = 1 substance;
  re2: s2 => s7; re2_v1*s3/(re2_k1 + s3);
    re2_v1 = 1 substance; re2_k1 = 1 substance;
  re3: s7 => s4; re3_v1*s2*s5/(re3_k1 + s2);  // modifiers: s6
    re3_v1 = 1 substance; re3_k1 = 1 substance;
  re4: s4 => s7; re4_v1*s4/(re4_k1 + s4);
    re4_v1 = 1 substance; re4_k1 = 1 substance;
  re5: s5 => s6; re5_v1*s5*s3/(re5_k1 + s5);  // modifiers: s2, s8
    re5_v1 = 1 substance; re5_k1 = 1 substance;
  re6: s6 => s5; re6_v1*s6/(re6_k1 + s6);
    re6_v1 = 1 substance; re6_k1 = 1 substance;
  re7: s2 => s8; ;  // modifiers: s6
  re8: s8 => s2; ;

  // Unit definitions:
  unit substance = mole;
  unit volume = litre;
  unit area = metre^2;
  unit length = metre;
  unit time = second;
end
