// SBML level 2 version 4

model untitled()
  // way too minimal insulin signaling network

  // Compartments:
  compartment default = 1 volume;

  // Species:
  // hlgygouyg
  species s4 in default = 0; s4 is "R";
  species s5 in default = 0; s5 is "A";
  species s6 in default = 0; s6 is "A";
  species s2 in default = 0; s2 is "R";
  species s7 in default = 0; s7 is "R";
  species s8 in default = 0; s8 is "R";
  substanceOnly species IIS_Signal in default = 0;
  species s9 in default = 0;
  species s13 in default = 0;
  species s16 in default = 0;
  species s26 in default = 0;

  // Reactions:
  re1: s7 => s2; re1_v1*s2*IIS_Signal/(re1_k1 + s2);  // modifiers: IIS_Signal
    re1_v1 = 1 substance; re1_k1 = 1 substance;
  re2: s2 => s7; re2_v1*s3/(re2_k1 + s3);
    re2_v1 = 1 substance; re2_k1 = 1 substance;
  re13: s4 => s7; re13_v1*s4/(re13_k1 + s4);
    re13_v1 = 1 substance; re13_k1 = 1 substance;
  re5: s6 => s5; re5_v1*s6/(re5_k1 + s6);
    re5_v1 = 1 substance; re5_k1 = 1 substance;
  re8: s8 => s2; ;
  re3: s2 + s5 -> s9; ;
  re4: s9 => s2 + s6; ;
  re9: s8 + s5 -> s13; ;
  re10: s13 => s8 + s6; ;
  re6: s6 + s2 -> s16; ;
  re7: s16 => s8 + s6; ;
  re11: s7 + s6 -> s26; ;
  re12: s26 => s4 + s6; ;

  // Unit definitions:
  unit substance = mole;
  unit volume = litre;
  unit area = metre^2;
  unit length = metre;
  unit time = second;
end
